variable  A string "bulkNi"
log		$A.log

boundary        p p p

units		metal
timestep	0.001

lattice         fcc 3.52
region          box block 0 20 0 20 0 20
create_box      1 box
create_atoms    1 box

pair_style      eam/alloy
pair_coeff      * * ni1.set 1
mass            * 58.71

compute         XRD all xrd  1.541838 Ni 2Theta 10 90 c 1 1 1 LP 1 echo

compute         SAED all saed 0.0251  Ni Kmax 0.85 Zone 0 0 0 c 1 1 1 &
                dR_Ewald 0.01 echo

fix             1 all ave/histo/weights 1 1 1 10 90 200 c_XRD[1] weights c_XRD[2] &
                mode vector file $A.hist.xrd
fix             2 all ave/time/saed 1 1 1 c_SAED  file $A_001.saed &
                Kmax 0.85 Zone 0 0 0 c 1 1 1 dR_Ewald 0.01 lambda 0.0251

dump            1 all custom 1 $A.dump id x y z
run             0

unfix           1
unfix           2
uncompute       XRD
uncompute       SAED
